**
** attention: units: cm,N,s
**
*NODE, NSET=Nall
       1,  2.00000e+01,  1.25000e+02,  4.00000e+01
       2,  2.00000e+01,  1.05000e+02,  4.00000e+01
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*ELEMENT, TYPE=C3D20, ELSET=Eall
     1,     1,     2,     3,     4,     5,     6,     7,     8,     9,    10,
          11,    12,    17,    18,    19,    20,    13,    14,    15,    16
     2,     2,    21,    22,     3,     6,    23,    24,     7,    25,    26,
          27,    10,    30,    31,    32,    18,    14,    28,    29,    15
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*NSET,NSET=Nfixx
558,
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*NSET,NSET=Nfixy
1,
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*NSET,NSET=Nfixz
123,
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*BOUNDARY
Nfixx,1,1
Nfixy,2,2
Nfixx,3,3
Nfixy,3,3
Nfixz,3,3
*MATERIAL,NAME=CONCRETE
*ELASTIC
1000000.,.3
*DENSITY
2.5E-5
*SOLID SECTION,ELSET=Eall,MATERIAL=CONCRETE
**
*STEP
*STATIC
*DLOAD
Eall,GRAV,981.,0.,0.,-1.
*DLOAD
306, P5, 0.400000
307, P4, 0.400000
309, P5, 0.400000
310, P4, 0.400000
312, P5, 0.400000
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792, P5, 0.400000
*NODE PRINT,NSET=Nall
U
*EL PRINT,ELSET=Eall
S
*END STEP
